// COMSOL Multiphysics 6.3.0.290 model "squeeze_film_bao_17_r23.mph"
// Outline of the model tree

Parameters
  L_plate = 400[um]
  W_plate = 400[um]
  R_hole = 23[um]
  H_gap = 1.8[um]
  T_backplate = 5[um]
  mu_air = 1.81e-5[Pa*s]
  p_ref = 1[atm]
  dh = 0.01*H_gap
  vf = 2*pi*freq*dh
  s_h = sqrt(pi)*R_hole
  n_h = 17/(L_plate*W_plate)

Variables
  var1 "变量 1"
    Cdamp = abs(intop1(tff.fwallz)/vf)
    Ppeak = maxop1(abs(pfilm))

Couplings
  intop1: Integration "积分 1" on all domains
  maxop1: Maximum "最大值 1" on all domains

Geometry
  geom1 "几何 1" (2D, length unit µm)
    plate: Rectangle "矩形" | size = {L_plate, W_plate}; pos = {-L_plate/2, -W_plate/2}
    fin: Finalize "形成联合体"

Materials
  mat1: Common "材料 1"
    def: def "基本"
      dynamicviscosity = mu_air
  matlnk1: Link "材料链接 1" on all domains

Physics
  tff: ThinFilmFlowDomain "薄膜流，域" on all domains
    dependent variable pfilm
    EquationType.EquationType = ModifiedReynoldsEquation
    ReferencePressure.pref = p_ref
    ffp1: FluidFilmProperties "液膜属性 1" (default) | hw1 = H_gap; TangentialWallVelocity = userdef; vw = {0, 0, vf}
    bdr1: Border "边界 1" (default)
    init1: init "初始值 1" (default)
    perf1: Perforations "穿孔 1" on all domains | PerforationAdmittance = Bao_model; s_h = s_h; l_h = T_backplate; n_h = n_h

Mesh
  mesh1 "网格 1"
    size: MeshSizeDefault "大小" | hmax = 26.8; hmin = 0.12; hcurve = 0.3; hgrad = 1.3
    ftri1: FreeTri "自由三角形网格 1" on remaining entities

Studies
  std1 "研究 1"
    freq: Frequency "频域" | plist = {1000, 10000, 20000}

Solver configurations
  sol1 "解 1" (study std1)
    v1: Variables "因变量 1"
    s1: Stationary "稳态求解器 1"
      p1: Parametric "参数化 1"
      fc1: FullyCoupled "全耦合 1"
      d1: Direct "直接，压力 (tff)"

Datasets
  dset1: Solution | solution = sol1

Derived values
  ev: EvalGlobal "全局计算" | data = dset1; expr = {freq, comp1.Cdamp, comp1.Ppeak}