// COMSOL Multiphysics 6.3.0.290 model "geometry_575_r23_corrected_preview.mph"
// Outline of the model tree

Parameters
  T_mem = 12[um]  // membrane thickness from 30 kHz reference design
  L_anchor = 136[um]  // anchor length
  W_anchor = 165[um]  // anchor width
  W_mem = 400[um]  // membrane width
  L_mem = 400[um]  // membrane length
  L_beam = 12[um]  // torsion beam length
  W_beam = 24[um]  // softened torsion beam width for higher sensitivity while keeping mode separation
  L_conn = 200[um]  // connection beam length
  W_conn = 120[um]  // connection beam width
  R_hole = 23[um]  // Corrected staggered-hole radius
  rho_mem = 2330[kg/m^3]  // 膜片密度
  E_mem = 160[GPa]  // membrane Young's modulus
  nu_mem = 0.28  // 泊松比
  L_side = (L_conn-L_anchor*2-L_beam)/2  // single torsion-beam side length
  E_beam = 100[GPa]  // beam Young's modulus
  p0 = 1[Pa]
  H_gap = 1.8[um]  // reduced air gap for higher capacitive sensitivity with pull-in margin check
  T_bp = 5[um]  // backplate thickness
  Vbias = 8[V]  // bias voltage for higher charge output
  eps0 = 8.854e-12[F/m]  // 真空介电常数
  Aeff = L_mem*W_mem-13*pi*R_hole^2  // single membrane effective electrode area after staggered 5-3-5 damping holes
  C0_one = eps0*Aeff/H_gap  // single electrode capacitance
  H_air_top = 50[um]  // upper air domain height

Common definitions
  mpf1: ParticipationFactors "参与因子 1"

Geometry
  geom1 "几何 1" (3D, length unit µm)
    blk1: Block "左膜片" | size = {L_mem, W_mem, T_mem}; pos = {-L_conn/2-L_mem, -W_mem/2, 0}
    blk2: Block "右膜片" | size = {L_mem, W_mem, T_mem}; pos = {L_conn/2, -W_mem/2, 0}
    blk3: Block "左连接梁" | size = {L_conn, W_conn, T_mem}; pos = {-L_conn/2, L_anchor/2+L_beam, 0}
    blk4: Block "右连接梁" | size = {L_conn, W_conn, T_mem}; pos = {-L_conn/2, -L_anchor/2-L_beam-W_conn, 0}
    blk5: Block "中心锚点" | size = {W_anchor, L_anchor, T_mem}; pos = {-W_anchor/2, -L_anchor/2, 0}
    blk6: Block "上扭转梁" | size = {W_beam, L_beam, T_mem}; pos = {-W_beam/2, L_anchor/2, 0}
    blk7: Block "下扭转梁" | size = {W_beam, L_beam, T_mem}; pos = {-W_beam/2, -L_anchor/2-L_beam, 0}
    cyl1: Cylinder "孔_上排基准" | r = R_hole; h = T_bp + 2[um]; pos = {-440, 120, -H_gap-T_bp-1[um]}
    arr1: Array "上排阵列 1" | input = cyl1; size = {5, 1, 1}; fullsize = {5, 1, 1}; displ = {70, 0, 0}
    cyl2: Cylinder "中间阻尼孔基准" | r = R_hole; h = T_bp + 2[um]; pos = {-465, 0, -H_gap-T_bp-1[um]}
    arr2: Array "中间阵列 2" | input = cyl2; size = {7, 1, 1}; fullsize = {7, 1, 1}; displ = {55, 0, 0}
    cyl3: Cylinder "下排阻尼孔基准" | r = R_hole; h = T_bp + 2[um]; pos = {-440, -120, -H_gap-T_bp-1[um]}
    arr3: Array "下排阵列 3" | input = cyl3; size = {5, 1, 1}; fullsize = {5, 1, 1}; displ = {70, 0, 0}
    copy1: Copy "复制 1" | input = arr1, arr2, arr3; keep = on; displx = 600; disply = 0; displz = 0
    dif1: Difference "差集 1" (disabled)
      input = blk1, blk2, blk3, blk4, blk5, blk6, blk7
      input2 = arr1, arr2, arr3, copy1
    blk8: Block "左侧空气间隙" | size = {L_mem, W_mem, H_gap}; pos = {-L_conn/2-L_mem, -W_mem/2, -H_gap}
    blk9: Block "右侧空气间隙" | size = {L_mem, W_mem, H_gap}; pos = {L_conn/2, -W_mem/2, -H_gap}
    blk10: Block "左背板" | size = {L_mem, W_mem, T_bp}; pos = {-L_conn/2 - L_mem, -W_mem/2, -H_gap - T_bp}
    blk11: Block "右背板" | size = {L_mem, W_mem, T_bp}; pos = {L_conn/2, -W_mem/2, -H_gap-T_bp}
    dif2: Difference "背板孔差集" | input = blk10, blk11; input2 = arr1, arr2, arr3, copy1
    fin: Finalize "形成联合体"

Materials
  mat4: Common "Polysilicon" on domains 1, 3-9, 11
    def: def "Basic"
      electricconductivity = sigma(T)
      thermalexpansioncoefficient = alpha(T)
      heatcapacity = 678[J/(kg*K)]
      relpermittivity = 4.5
      density = 2320[kg/m^3]
      thermalconductivity = k(T)
      sigma: Analytic | expr = 1/(2e-5*(1+1.25e-3*(T-298.15))); args = T; dermethod = manual; argders = {T, d(1/(2e-5*(1+1.25e-3*(T-298.15))), T)}; fununit = S/m; argunit = K
      alpha: Analytic | expr = (3.725*(1-exp(-5.88e-3*(T-125)))+5.548e-4*T)*1e-6; args = T; dermethod = manual; argders = {T, d((3.725*(1-exp(-5.88e-3*(T-125)))+5.548e-4*T)*1e-6, T)}; fununit = 1/K; argunit = K
      k: Analytic | expr = 1/(-2.2e-11*T^3 + 9e-8*T^2 - 1e-5*T + 0.014); args = T; dermethod = manual; argders = {T, d(1/(-2.2e-11*T^3 + 9e-8*T^2 - 1e-5*T + 0.014), T)}; fununit = W/(m*K); argunit = K
    Enu: Enu "Young's modulus and Poisson's ratio"
      E = 169[GPa]
      nu = 0.22
    linzRes: linzRes "Linearized resistivity"
      rho0 = 2e-5[Ω*m]
      alpha = 1.25e-3[1/K]
      Tref = 298.15[K]
  mat5: Common "Air" on domains 2, 10
    def: def "Basic"
      thermalexpansioncoefficient = alpha_p(pA,T)
      molarmass = 0.02897[kg/mol]
      bulkviscosity = muB(T)
      relpermeability = 1
      relpermittivity = 1
      dynamicviscosity = eta(T)
      ratioofspecificheat = 1.4
      electricconductivity = 0[S/m]
      heatcapacity = Cp(T)
      density = rho(pA,T)
      thermalconductivity = k(T)
      soundspeed = cs(T)
      eta: Piecewise | arg = T; pieces = {200.0, 1600.0, -8.38278E-7+8.35717342E-8*T^1-7.69429583E-11*T^2+4.6437266E-14*T^3-1.06585607E-17*T^4}; argunit = K; fununit = Pa*s
      Cp: Piecewise | arg = T; pieces = {200.0, 1600.0, 1047.63657-0.372589265*T^1+9.45304214E-4*T^2-6.02409443E-7*T^3+1.2858961E-10*T^4}; argunit = K; fununit = J/(kg*K)
      rho: Analytic | expr = pA*0.02897/R_const[K*mol/J]/T; args = {pA, T}; fununit = kg/m^3; argunit = {Pa, K}
      k: Piecewise | arg = T; pieces = {200.0, 1600.0, -0.00227583562+1.15480022E-4*T^1-7.90252856E-8*T^2+4.11702505E-11*T^3-7.43864331E-15*T^4}; argunit = K; fununit = W/(m*K)
      cs: Analytic | expr = sqrt(1.4*R_const[K*mol/J]/0.02897*T); args = T; fununit = m/s; argunit = K
      an1: Analytic | funcname = alpha_p; expr = -1/rho(pA,T)*d(rho(pA,T),T); args = {pA, T}; fununit = 1/K; argunit = {Pa, K}
      an2: Analytic "Analytic 2a" | funcname = muB; expr = 0.6*eta(T); args = T; fununit = Pa*s; argunit = K
    RefractiveIndex: RefractiveIndex
      n = 1
      ki = 0
    NonlinearModel: NonlinearModel
      BA = def.gamma-1
    idealGas: idealGas
      Rs = R_const/Mn
      heatcapacity = Cp(T)
      ratioofspecificheat = 1.4
      molarmass = 0.02897[kg/mol]
      Cp: Piecewise | arg = T; pieces = {200.0, 1600.0, 1047.63657-0.372589265*T^1+9.45304214E-4*T^2-6.02409443E-7*T^3+1.2858961E-10*T^4}; argunit = K; fununit = J/(kg*K)

Physics
  solid: SolidMechanics "固体力学" on domains 1, 3-9, 11
    dependent variable u = {u, v, w}
    lemm1: LinearElasticModel "线弹性材料 1" (default)
      dmp1: Damping "阻尼 1" on domains 3-8, 11 | DampingType = IsotropicLossFactor; eta_s_mat = userdef; eta_s = 0.35
    free1: Free "自由 1" (default)
    init1: init "初始值 1" (default)
    fix1: Fixed "固定约束 1" on boundaries 3, 114, 136
    bndl1: BoundaryLoad "边界载荷 1" on boundaries 10 | forceReferenceArea = {0, 0, -p0}
    bndl2: BoundaryLoad "边界载荷 2" on boundaries 143 | forceReferenceArea = {0, 0, p0}
  es: Electrostatics "静电" on domains 2, 10
    dependent variable V
    fsp1: FreeSpace "自由空间 1" (default)
    zc1: ZeroCharge "零电荷 1" (default)
    init1: init "初始值 1" (default)
    gnd1: Ground "接地 1" on boundaries 9, 142
    pot1: ElectricPotential "电势 1" (disabled) on boundaries 6, 42, 54, 66, 69, 72, 81, 86, 89, 96, 139, 177, 189, 201, 204, 207, 216, 221, 224, 231
      V0 = Vbias
    term1: Terminal "终端 1" on boundaries 6, 42, 54, 66, 69, 72, 81, 86, 89, 96, 139, 177, 189, 201, 204, 207, 216, 221, 224, 231
      TerminalType = Voltage
      V0 = Vbias
  ta: ThermoacousticsSinglePhysics "热黏性声学，频域" (disabled) on domains 10
    dependent variable p
    MeshControl.SizeControlParameter = UserDefined
    MeshControl.SizeExpression = 2e-6
    MeshControl.ElementsPerWavelength = Automatic
    tam1: ThermoviscousAcousticsModel "热黏性声学模型 1" (default)
    wall1: Wall "壁 1" (default)
    init1: init "初始值 1" (default)

Multiphysics
  tsb1: ThermoacousticStructureBoundary "热黏性声-结构边界 1" (disabled) on boundaries 9, 142
    Thermoacoustics_physics = ta
    Structure_physics = solid

Mesh
  mesh1 "网格 1" (physics-controlled)

Studies
  std1 "研究 1"
    eig: Eigenfrequency "特征频率"
      shift = 1[Hz]
      solve for = {solid}
      activateCoupling = {tsb1, off}
      filtereigexpression = real(freq)>20
      filtereigdescription = Positive structural eigenfrequencies
      neigs = 6
  std2 "研究 2"
    freq: Frequency "频域"
      plist = {20, 1000, 5000, 10000, 15000, 20000}
      solve for = {solid}
      activateCoupling = {tsb1, off}
  std3 "研究 3"
    stat: Stationary "稳态" | solve for = {es, ta}

Solver configurations
  sol1 "解 1" (study std1)
    v1: Variables "因变量 1"
    e1: Eigenvalue "特征值求解器 1"
      dDef: Direct "直接"
  sol2 "解 2" (study std2)
    v1: Variables "因变量 1"
    s1: Stationary "稳态求解器 1"
      p1: Parametric "参数化 1"
      fc1: FullyCoupled "全耦合 1"
      d1: Direct "建议的直接求解器 (solid)"
  sol3 "解 3" (study std3)
    v1: Variables "因变量 1"
    s1: Stationary "稳态求解器 1"
      fc1: FullyCoupled "全耦合 1"
      i1: Iterative "迭代 1"
        mg1: Multigrid "多重网格 1"

Datasets
  dset1: Solution | solution = sol1
  dset2: Solution | solution = sol2
  dset3: Solution | solution = sol3

Derived values
  gev1: EvalGlobal "全局计算 1" | data = dset3; table = tbl3; expr = es.Q0_1; unit = C; descr = 终端电荷
  av1: AvSurface "表面平均值(位移) 1" on boundaries 9 | data = dset2; table = tbl1; expr = w; unit = m
  av2: AvSurface "表面平均值(位移) 2" on boundaries 142 | data = dset2; table = tbl2; expr = w; unit = m
  pev1: EvalPoint "点计算 1" | data = dset1; table = new; expr = es.normE; unit = V/m
  eig_freq_eval: EvalGlobal "全局计算" | data = dset1; expr = freq; unit = Hz; descr = Eigenfrequency
  freq_eval: EvalGlobal "全局计算 2" | data = dset2; expr = freq; unit = Hz

Tables
  tbl1: Table "表格 1（左膜片位移）"
    // 表面平均值 1
    freq (Hz) | 位移场，Z 分量 (µm)
    100 | -0.00731281+0.000219401i
    300 | -0.00731736+0.000219674i
    500 | -0.00732646+0.000220222i
    700 | -0.00734017+0.000221047i
    900 | -0.00735852+0.000222155i
    1100 | -0.00738159+0.000223551i
    1300 | -0.00740946+0.000225245i
    1500 | -0.00744225+0.000227244i
    1700 | -0.00748008+0.000229562i
    1900 | -0.00752309+0.000232213i
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  tbl2: Table "表格 2（右膜片位移）"
    // 表面平均值 2
    freq (Hz) | 位移场，Z 分量 (µm)
    100 | 0.00731189-0.000219374i
    300 | 0.00731644-0.000219647i
    500 | 0.00732554-0.000220194i
    700 | 0.00733924-0.00022102i
    900 | 0.00735759-0.000222127i
    1100 | 0.00738066-0.000223523i
    1300 | 0.00740853-0.000225216i
    1500 | 0.00744131-0.000227216i
    1700 | 0.00747913-0.000229534i
    1900 | 0.00752215-0.000232184i
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  tbl3: Table "表格 3（2V电荷计算结果）"
    // 全局计算 1
    终端电荷 (C)
    1.64513e-12

Plots
  pg1: PlotGroup3D "三维绘图组(特征频率)" | data = dset1
    surf1: Surface "表面 1" | expr = solid.disp; unit = µm; rangeminpositive = 6.78894841431e-21
      def1: Deform "变形 1"
        expr = {u, v, w}
        maxreldeform = 0.1
        maxabsdeform = 0.00116494161984
        mergedmaxabsdeform = 0.00116494161984
        boundingbox = {-500, 499.9999999999999, -200, 200, -8.2, 10}
        mergedboundingbox = {-500, 499.9999999999999, -200, 200, -8.2, 10}
        deformindices = {1, 2, 3}
  pg2: PlotGroup3D "应力 (solid)" | data = dset2
    vol1: Volume "体 1" | expr = w; rangeminpositive = 3.903285073e-13
      def: Deform "变形"
        expr = {u, v, w}
        descr = 位移场
        maxreldeform = 0.1
        maxabsdeform = 0.0123193468792
        mergedmaxabsdeform = 0.0123193468792
        boundingbox = {-500, 499.9999999999999, -200, 200, -8.2, 10}
        mergedboundingbox = {-500, 499.9999999999999, -200, 200, -8.2, 10}
        deformindices = {1, 2, 3}
  pg3: PlotGroup1D "表格位移曲线" | data = dset2
  pg4: PlotGroup3D "电势 (es)" | data = dset3
    mslc1: Multislice "多切面 1"
      expr = V
      multiplanexmethod = coord
      xcoord = es.CPx
      multiplaneymethod = coord
      ycoord = es.CPy
      multiplanezmethod = coord
      zcoord = es.CPz
      rangeminpositive = 5.92673372764e-10
      rangeisshared = on
    strmsl1: StreamlineMultislice "多切面上的流线 1"
      expr = {es.Ex, es.Ey, es.Ez}
      multiplanexmethod = coord
      xcoord = es.CPx
      multiplaneymethod = coord
      ycoord = es.CPy
      multiplanezmethod = coord
      zcoord = es.CPz
      udist = 0.02
      maxsteps = 5000
      col1: Color "颜色表达式 1" | expr = V
      filt1: Filter "过滤器 1" | expr = !isScalingSystemDomain
  pg5: PlotGroup3D "电场 (es)" | data = dset3
    mslc1: Multislice "多切面 1"
      expr = es.normE
      multiplanexmethod = coord
      xcoord = es.CPx
      multiplaneymethod = coord
      ycoord = es.CPy
      multiplanezmethod = coord
      zcoord = es.CPz
      rangeminpositive = 82.6345135440298
      rangeisshared = on
    strmsl1: StreamlineMultislice "多切面上的流线 1"
      expr = {es.Ex, es.Ey, es.Ez}
      multiplanexmethod = coord
      xcoord = es.CPx
      multiplaneymethod = coord
      ycoord = es.CPy
      multiplanezmethod = coord
      zcoord = es.CPz
      udist = 0.02
      maxsteps = 5000
      col1: Color "颜色表达式 1" | expr = es.normE
      filt1: Filter "过滤器 1" | expr = !isScalingSystemDomain